<Lems>

    <!--
    This LEMS file has been generated from:
        PyNN v0.9.5
        libNeuroML v0.2.47
        pyNeuroML v0.3.15
     -->

    <!-- Specify which component to run -->
    <Target component="Sim_PyNN_NeuroML2_Export"/>

    <!-- Include core NeuroML2 ComponentType definitions -->
    <Include file="Cells.xml"/>
    <Include file="Networks.xml"/>
    <Include file="Simulation.xml"/>

    <Include file="PyNN.xml"/>
    <Include file="PyNN_NeuroML2_Export.net.nml"/>

    <Simulation id="Sim_PyNN_NeuroML2_Export" length="1000.0ms" step="0.1ms" target="PyNN_NeuroML2_Export" seed="12345">  <!-- Note seed: ensures same random numbers used every run -->

    </Simulation>

</Lems>
